# " Упражнение 1"
# "1"
sqrt(100) = 10
|-10| = 10
10! = 3628800
# "2"
a := 3.4
b := 6.22
c ≡ 0.149
# "3"
Z := (2*a*b + nthroot(c, 3))/sqrt((a^2 + b^(a + c))*c) = 4.29283
N := e^sin(c)*cos(a/b) = 0.990999
# "4"
π = 3.14159
Z := -3 + 2i
|Z| = 3.60555
Re(Z) = -3
Im(Z) = 2
arg(Z) = 2.55359
# "5"
sqrt(Z) = 0.550251 + 1.81735i
sqrt(-5) = 2.23607i
2*Z = -6 + 4i
Z1 := 1 + 2i
Z2 := 3 + 4i
Z1 + Z2 = 4 + 6i
Z1 - Z2 = -2 - 2i
Z1*Z2 = -5 + 10i
Z1/Z2 = 0.44 + 0.08i
i := 1 .. 10
sum(i, i) = 55
product(i + 1, i) = 39916800
integral(x^2*ln(x + 2), x = 0 .. 0.4) = 0.0177564
integral(1/tan(2*x)/sin(2*x)^2, x = 0.8 .. 1.2) = -0.297731
x := 2
d/dx(x^5) = 80
d/dx(sin(x)) = -0.416147
# "Упражнение 2"
i := 0, 1 .. 4
d[i] := 0.5, 1, 1.5, 2, 2.5
S[i] := 3.3, 5.9, 7, 6.3, 4.2
R[i] := 2, 3.9, 4.5, 3.7, 1.2
R[i]*d[i] = [1; 3.9; 6.75; 7.4; 3]
S[i]*d[i] = [1.65; 5.9; 10.5; 12.6; 10.5]
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# "Упражнение 3"
α := 0, π/30 .. 2*π
X(α) := cos(α)*sin(α)
P(α) := cos(α)
Y(α) := 1.5*cos(α)^2 - 1
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α := π/2
X(α) := cos(α)*sin(α)
Y(α) := 1.5*cos(α)^2 - 1
X(α) = 6.12303e-17
Y(α) = -1
# "Упражнение 4"
# "1"
Q := [
    1, 5, 8, 7, 5, 1;
    2, 8, 9, 3, 7, 5;
    8, 6, 3, 7, 2, 1;
    7, 9, 8, 2, 5, 6;
    8, 5, 3, 5, 4, 6;
    1, 2, 4, 8, 9, 3
]
# [component: inputs Q]
# "2,1"
X(t, a) := t*cos(α)*sin(α)
M := CreateMesh(X, -5, 5, 0, 2*π, 40, 40)
# [component: inputs M]
# "2,2"
X(t, α) := t*cos(α)*sin(α)
i := 0 .. 40
t[i] := -5 + 0.25*i
j := 0 .. 40
α[j] := π*j/20
M[i, j] := X(t[i], α[j])
Z := matrix(40, 40, X)
# [component: inputs M]
# "3,3"
F1(x, y) := (x + y)^2/10
F2(x, y) := 5*cos((x - y)/3)
V := CreateMesh(F1)
B := CreateMesh(F2)
# [component: inputs V, B]
# "Упражнение 5"
# "Вариант 1"
x := 0, 0.1 .. 30
f(x) := x + FRAME
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# "Вариант 2"
i := 0 .. FRAME + 1
g[i] := 0.5*i*cos(i)
h[i] := i*sin(i)
k[i] := 2*i
# [component: inputs g, h, k]
# "Вариант 3"
i := 0 .. 20
j := 0 .. 20
f(x, y) := sin(x^2 + y^2 + FRAME)
x[i] := -1.5 + 0.15*i
y[j] := -1.5 + 0.15*j
M[i, j] := f(x[i], y[j])
# [component: inputs M]
# "Вариант 4"
r := FRAME
R := 6
n := 0 .. 20
m := 0 .. 20
v[n] := 2*π*n/(r + 1)
w[m] := 2*π*m/(r + 1)
x[m, n] := (R + r*cos(v[n]))*cos(w[m])
y[m, n] := (R + r*cos(v[n]))*sin(w[m])
z[m, n] := r*sin(v[n])
# [component: inputs x, y, z]
# "-------------------------------------------------------------------------------------------------------------------------"
x := 0 .. 20
f1(x, y) := -sin(x^2 + y^2)
f2(x, y) := x^2 + y^2 - 5
y := 0 .. 20
M1[x, y] := f1((x - 10)/5, (y - 10)/5)
M2[x, y] := f2((x - 10)/5, (y - 10)/5)
# [component: inputs [(M1, M2, M2), □, □]]
f(x, y) := sin(x^2 + y^2)
M := CreateMesh(f, -1.5, 1.5, -1.5, 1.5, 20, 20)
# [component: inputs [(M, M), □]]
f(i, j) := i^2 + j^2
matrix(3, 4, f) = [0, 1, 4, 9; 1, 2, 5, 10; 4, 5, 8, 13]
matrix(10, 10, f) = [
    0, 1, 4, 9, 16, 25, 36, 49, 64, 81;
    1, 2, 5, 10, 17, 26, 37, 50, 65, 82;
    4, 5, 8, 13, 20, 29, 40, 53, 68, 85;
    9, 10, 13, 18, 25, 34, 45, 58, 73, 90;
    16, 17, 20, 25, 32, 41, 52, 65, 80, 97;
    25, 26, 29, 34, 41, 50, 61, 74, 89, 106;
    36, 37, 40, 45, 52, 61, 72, 85, 100, 117;
    49, 50, 53, 58, 65, 74, 85, 98, 113, 130;
    64, 65, 68, 73, 80, 89, 100, 113, 128, 145;
    81, 82, 85, 90, 97, 106, 117, 130, 145, 162
]
matrix(20, 20, f) = [
    0, 1, 4, 9, 16, 25, 36, 49, 64, 81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;
    1, 2, 5, 10, 17, 26, 37, 50, 65, 82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;
    4, 5, 8, 13, 20, 29, 40, 53, 68, 85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;
    9, 10, 13, 18, 25, 34, 45, 58, 73, 90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;
    16, 17, 20, 25, 32, 41, 52, 65, 80, 97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;
    25, 26, 29, 34, 41, 50, 61, 74, 89, 106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;
    36, 37, 40, 45, 52, 61, 72, 85, 100, 117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;
    49, 50, 53, 58, 65, 74, 85, 98, 113, 130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;
    64, 65, 68, 73, 80, 89, 100, 113, 128, 145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;
    81, 82, 85, 90, 97, 106, 117, 130, 145, 162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;
    100, 101, 104, 109, 116, 125, 136, 149, 164, 181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;
    121, 122, 125, 130, 137, 146, 157, 170, 185, 202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;
    144, 145, 148, 153, 160, 169, 180, 193, 208, 225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;
    169, 170, 173, 178, 185, 194, 205, 218, 233, 250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;
    196, 197, 200, 205, 212, 221, 232, 245, 260, 277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;
    225, 226, 229, 234, 241, 250, 261, 274, 289, 306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;
    256, 257, 260, 265, 272, 281, 292, 305, 320, 337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;
    289, 290, 293, 298, 305, 314, 325, 338, 353, 370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;
    324, 325, 328, 333, 340, 349, 360, 373, 388, 405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;
    361, 362, 365, 370, 377, 386, 397, 410, 425, 442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]
matrix(40, 40, f) =  # no stored result
M := matrix(5, 5, f) = [0, 1, 4, 9, 16; 1, 2, 5, 10, 17; 4, 5, 8, 13, 20; 9, 10, 13, 18, 25; 16, 17, 20, 25, 32]
# [component: inputs [(M, M), □]]
f(t) := [t*cos(t); t^2*sin(t); t]
F := CreateSpace(f, -15, 15, 1000)
# [component: inputs [(F, F), □]]
